*Heading
** Job name: Job-DISPTEST Model name: Model-1
*Preprint, echo=NO, model=NO, history=NO, contact=NO
**
** PARTS
**
*Part, name=Part-1
*Node
      1,           0.,         -20.,           0.
      2,           0.,           0.,           0.
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*Element, type=S4R
  1,  20,  21, 233, 218
  2,  21,  22, 234, 233
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*Nset, nset=Set-1, generate
    1,  1519,     1
*Elset, elset=Set-1, generate
    1,  1456,     1
** Section: Section-1
*Shell Section, elset=Set-1, material=Material-1
1., 5
*End Part
**
**
** ASSEMBLY
**
*Assembly, name=Assembly
**
*Instance, name=Part-1-1, part=Part-1
*End Instance
**
*Nset, nset=Set-1, instance=Part-1-1
 2,
*Nset, nset=Set-2, instance=Part-1-1, generate
    1,  1519,     1
*Elset, elset=Set-2, instance=Part-1-1, generate
    1,  1456,     1
*Nset, nset=Set-3, instance=Part-1-1
   1,   3,   4,   5,   6,   7
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*Elset, elset=Set-3, instance=Part-1-1
    1,    2,    3,    4,    5,    6
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*End Assembly
**
** MATERIALS
**
*Material, name=Material-1
*Elastic
1., 0.25
**
** BOUNDARY CONDITIONS
**
** Name: BC-1 Type: Symmetry/Antisymmetry/Encastre
*Boundary
Set-1, ENCASTRE
** Name: BC-2 Type: Displacement/Rotation
*Boundary
Set-2, 3, 3
** ----------------------------------------------------------------
**
** STEP: Step-1
**
*Step, name=Step-1, nlgeom=NO
*Static
0.1, 1., 1e-05, 0.1
**
** BOUNDARY CONDITIONS
**
** Name: BC-3 Type: Displacement/Rotation
*Boundary, user
Set-3, 1, 1, 1.
Set-3, 2, 2, 1.
**
** OUTPUT REQUESTS
**
*Restart, write, frequency=0
**
** FIELD OUTPUT: F-Output-1
**
*Output, field, variable=PRESELECT
**
** HISTORY OUTPUT: H-Output-1
**
*Output, history, variable=PRESELECT
*End Step
